X(x, y, z) := x - 0.5*y - 0.5*z
Y(x, y, z) := sqrt(3)/2*y - sqrt(3)/2*z
T(v) := [X(v[0], v[1], v[2]); Y(v[0], v[1], v[2])]
T([1; 1; -1]) = [1; 1.73205]
M := [1, -0.5, -0.5; 0, sqrt(3)/2, -sqrt(3)/2]
transpose(M) = [1, 0; -0.5, 0.866025; -0.5, -0.866025]
M*[0; 0; -2] = [1; 1.73205]
M*[1; 1; -1] = [1; 1.73205]
transpose(M)*[1; 1.732] = [1; 0.999956; -1.99996]
x(y, X, Y) := y + X - Y/sqrt(3)
z(y, Y) := y - 2*Y/sqrt(3)
x(1, 1, sqrt(3)) = 1
z(1, sqrt(3)) = -1
