ym(yc) := floor(2/3*(yc + 1/2))
xstr(xc) := floor(xc*2/sqrt(3))
ystr(yc) := floor(2/3*(yc + 1/2))
ystr(1.2) = 1
edg_evn(xstr, ystr) := [xstr*sqrt(3)/2, (xstr + 1)*sqrt(3)/2; (ystr + 1)*3/2 - 1/2, ystr*3/2 - 1/2]
edg_odd(xstr, ystr) := [xstr*sqrt(3)/2, (xstr + 1)*sqrt(3)/2; ystr*3/2 - 1/2, (ystr + 1)*3/2 - 1/2]
d(p, edg) := (p[0] - edg[:, 0][0])*(edg[:, 1][1] - edg[:, 0][1]) - (p[1] - edg[:, 0][1])*(edg[:, 1][0] - edg[:, 0][0])
d([x[c]; y[c]], edg_evn(x[str], y[str])) → (sqrt(3)*(x[str] + 1)/2 - sqrt(3)*x[str]/2)*(3*y[str]/2 - y[c] + 1) + 3*sqrt(3)*x[str]/4 - 3*x[c]/2
d([x[c]; y[c]], edg_odd(x[str], y[str])) → 3*x[c]/2 - 3*sqrt(3)*x[str]/4 - (sqrt(3)*(x[str] + 1)/2 - sqrt(3)*x[str]/2)*(y[c] - 3*y[str]/2 + 1/2)
d([x[c]; y[c]], edg_evn(xstr(x[c]), ystr(y[c])))
D(x, y) := sign(d([x; y], {
    edg_evn(xstr(x), ystr(y)) if mod(xstr(x) + ystr(y), 2) == 0
    edg_odd(xstr(x), ystr(y)) otherwise
}))
sign(d([x; y], [X1, X2; Y1, Y2])) → sign((Y1 - Y2)*(X1 - x) - (X1 - X2)*(Y1 - y))
X := 0
Y := 1.8
ym(Y) = 1
-sign(BL*x - BR*x - 1/2*sqrt(3)*BL + 1/2*sqrt(3)*y - 1/2*sqrt(3)*BL*floor(2/3*sqrt(3)*x) + 1/2*sqrt(3)*BR*floor(2/3*sqrt(3)*x))
xstr(X) = 0
ystr(Y) = 1
edg_evn(xstr(X), ystr(Y)) = [0, 0.866025; 2.5, 1]
edg_odd(xstr(X), ystr(Y)) = [0, 0.866025; 1, 2.5]
D(X, Y) = -1
# [component: inputs D]
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